# 教学产品单元过程

Dataset: EcoSpold 2, unit process
Geography: 教学区域（虚构）
Time period: 2025-01-01 to 2025-12-31
Technology level: current
Scenario: 教学情景
System model: 教学约定系统（非官方模型）
Generated by: Teaching author
Database: 教学主数据上下文（虚构UUID）
isCopyrightProtected: false
accessRestrictedTo: 0

## General comment
教学构造，非 ecoinvent 真实数据。仅用于格式、读数和算术比例演示。参考数量不是默认1；不据此演示分配、完整LCI或官方LCIA算法。

## Parameters
- 电力强度（教学）: 2.5 kWh/kg; name electricity_intensity

## Reference product
- 教学产品: 10 kg
  properties: 干质量（教学比例） 1 kg/kg

## Inputs from technosphere
- 教学电力: 25 kWh; name electricity_use; = electricity_intensity * 10; lognormal variance with pedigree 0.04

## Inputs from nature
- 水，来自环境（教学） [自然资源, 水]: 0.04 m3

## Emissions to nature
- 二氧化碳，化石源（教学） [空气, 未指定]: 1.5, -0.1 kg (2 entries)
- 二氧化碳，生物源（教学） [空气, 未指定]: 0.2 kg
